// SBML level 3 version 2

function normal(m, s)
  m;
end
normal is "Normal distribution";

model BetIpart_module(Cell, Y_TetR, Y_HlyIIR, Y_BetI)

  // Compartments:
  compartment Cell = 1;

  // Species:
  substanceOnly species BetIpart_fc in Cell = 2;
  substanceOnly species Y_BetI in Cell = 0;
  substanceOnly species Y_TetR in Cell = 0;
  substanceOnly species Y_HlyIIR in Cell = 0;

  // Parameters:
  kr_f = 0.5; kr_f is "Forward repression binding rate";
  kr_r = 1; kr_r is "Reverse repression binding rate";
  ka_f = 0.0033; ka_f is "Forward activation binding rate";
  ka_r = 1; ka_r is "Reverse activation binding rate";
  ko_f = 0.033; ko_f is "Forward RNAP binding rate";
  ko_r = 1; ko_r is "Reverse RNAP binding rate";
  kao_f = 1; kao_f is "Forward activated RNAP binding rate";
  kao_r = 1; kao_r is "Reverse activated RNAP binding rate";
  nc = 2; nc is "Stoichiometry of binding";
  nr = 30; nr is "Initial RNAP count";
  ko = 0.05; ko is "Open complex production rate";
  kb = 0.0001; kb is "Basal production rate";
  ng = 2; ng is "Initial promoter count";
  np = 10; np is "Stoichiometry of production";
  ka = 0.25; ka is "Activated production rate";
  ymax_HlyIIR = abs(normal(2.5, 2.5*ExNoise));
  ymin_HlyIIR = abs(normal(0.07, 0.07*ExNoise));
  alpha_HlyIIR = 1;
  beta_HlyIIR = 1;
  ymax_BetI = abs(normal(3.8, 3.8*ExNoise));
  ymin_BetI = abs(normal(0.07, 0.07*ExNoise));
  n_BetI = abs(normal(2.4, 2.4*ExNoise));
  K_BetI = abs(normal(0.41, 0.41*ExNoise));
  ExNoise = 0.4;

  // Assignment rules:
  BetI_SS := ymin_BetI + (ymax_BetI - ymin_BetI)*K_BetI^n_BetI/(K_BetI^n_BetI + (Y_TetR*alpha_HlyIIR*(Y_HlyIIR - ymin_HlyIIR + beta_HlyIIR*(ymax_HlyIIR - Y_HlyIIR))/(ymax_HlyIIR - ymin_HlyIIR) + Y_HlyIIR)^n_BetI) - Y_BetI;

  // Reactions:
  dy_BetI: => Y_BetI; piecewise(tauON*BetI_SS, BetI_SS > 0, tauOFF*BetI_SS);  // modifiers: BetIpart_fc, Y_TetR, Y_HlyIIR
    tauON = 1.7; tauOFF = 4.044444;
end
