// SBML level 3 version 2

function normal(m, s)
  m;
end
normal is "Normal distribution";

model HlyIIRpart_module(Cell, Y_TetR, Y_AraC, Y_HlyIIR)

  // Compartments:
  compartment Cell = 1;

  // Species:
  substanceOnly species HlyIIRpart_fc in Cell = 2;
  substanceOnly species Y_HlyIIR in Cell = 0;
  substanceOnly species Y_TetR in Cell = 0;
  substanceOnly species Y_AraC in Cell = 0;

  // Parameters:
  kr_f = 0.5; kr_f is "Forward repression binding rate";
  kr_r = 1; kr_r is "Reverse repression binding rate";
  ka_f = 0.0033; ka_f is "Forward activation binding rate";
  ka_r = 1; ka_r is "Reverse activation binding rate";
  ko_f = 0.033; ko_f is "Forward RNAP binding rate";
  ko_r = 1; ko_r is "Reverse RNAP binding rate";
  kao_f = 1; kao_f is "Forward activated RNAP binding rate";
  kao_r = 1; kao_r is "Reverse activated RNAP binding rate";
  nc = 2; nc is "Stoichiometry of binding";
  nr = 30; nr is "Initial RNAP count";
  ko = 0.05; ko is "Open complex production rate";
  kb = 0.0001; kb is "Basal production rate";
  ng = 2; ng is "Initial promoter count";
  np = 10; np is "Stoichiometry of production";
  ka = 0.25; ka is "Activated production rate";
  ymax_TetR = abs(normal(4.4, 4.4*ExNoise));
  ymin_TetR = abs(normal(0.0013, 0.0013*ExNoise));
  alpha_TetR = 1;
  beta_TetR = 1;
  ymax_HlyIIR = abs(normal(2.5, 2.5*ExNoise));
  ymin_HlyIIR = abs(normal(0.07, 0.07*ExNoise));
  n_HlyIIR = abs(normal(2.6, 2.6*ExNoise));
  K_HlyIIR = abs(normal(0.19, 0.19*ExNoise));
  ExNoise = 0.4;

  // Assignment rules:
  HlyIIR_SS := ymin_HlyIIR + (ymax_HlyIIR - ymin_HlyIIR)*K_HlyIIR^n_HlyIIR/(K_HlyIIR^n_HlyIIR + (Y_AraC*alpha_TetR*(Y_TetR - ymin_TetR + beta_TetR*(ymax_TetR - Y_TetR))/(ymax_TetR - ymin_TetR) + Y_TetR)^n_HlyIIR) - Y_HlyIIR;

  // Reactions:
  dy_HlyIIR: => Y_HlyIIR; piecewise(tauON*HlyIIR_SS, HlyIIR_SS > 0, tauOFF*HlyIIR_SS);  // modifiers: HlyIIRpart_fc, Y_TetR, Y_AraC
    tauON = 1.7; tauOFF = 4.044444;
end
