// SBML level 3 version 2

function normal(m, s)
  m;
end
normal is "Normal distribution";

model LacIsensor_module(Cell, IPTG, Y_LacI)

  // Compartments:
  compartment Cell = 1;

  // Species:
  substanceOnly species LacIsensor_fc in Cell = 2;
  substanceOnly species Y_LacI in Cell = 0;
  substanceOnly species $IPTG in Cell = 0;

  // Parameters:
  kr_f = 0.5; kr_f is "Forward repression binding rate";
  kr_r = 1; kr_r is "Reverse repression binding rate";
  ka_f = 0.0033; ka_f is "Forward activation binding rate";
  ka_r = 1; ka_r is "Reverse activation binding rate";
  ko_f = 0.033; ko_f is "Forward RNAP binding rate";
  ko_r = 1; ko_r is "Reverse RNAP binding rate";
  kao_f = 1; kao_f is "Forward activated RNAP binding rate";
  kao_r = 1; kao_r is "Reverse activated RNAP binding rate";
  nc = 2; nc is "Stoichiometry of binding";
  nr = 30; nr is "Initial RNAP count";
  ko = 0.05; ko is "Open complex production rate";
  kb = 0.0001; kb is "Basal production rate";
  ng = 2; ng is "Initial promoter count";
  np = 10; np is "Stoichiometry of production";
  ka = 0.25; ka is "Activated production rate";
  ymax_LacI = abs(normal(2.8, 2.8*ExNoise));
  ymin_LacI = abs(normal(0.0034, 0.0034*ExNoise));
  n_LacI = abs(normal(2.65, 2.65*ExNoise));
  K_LacI = abs(normal(0.1295, 0.1295*ExNoise));
  ExNoise = 0.4;

  // Assignment rules:
  LacI_SS := piecewise(ymax_LacI - Y_LacI, IPTG > 0, ymin_LacI - Y_LacI);

  // Reactions:
  dy_LacI: => Y_LacI; piecewise(tauON*LacI_SS, LacI_SS > 0, tauOFF*LacI_SS);  // modifiers: LacIsensor_fc, IPTG
    tauON = 1.7; tauOFF = 4.044444;
end
