// SBML level 3 version 2

function normal(m, s)
  m;
end
normal is "Normal distribution";

model PhlFpart_module(Cell, Y_LacI, Y_AmtR, Y_PhlF)

  // Compartments:
  compartment Cell = 1;

  // Species:
  substanceOnly species PhlFpart_fc in Cell = 2;
  substanceOnly species Y_PhlF in Cell = 0;
  substanceOnly species Y_LacI in Cell = 0;
  substanceOnly species Y_AmtR in Cell = 0;

  // Parameters:
  kr_f = 0.5; kr_f is "Forward repression binding rate";
  kr_r = 1; kr_r is "Reverse repression binding rate";
  ka_f = 0.0033; ka_f is "Forward activation binding rate";
  ka_r = 1; ka_r is "Reverse activation binding rate";
  ko_f = 0.033; ko_f is "Forward RNAP binding rate";
  ko_r = 1; ko_r is "Reverse RNAP binding rate";
  kao_f = 1; kao_f is "Forward activated RNAP binding rate";
  kao_r = 1; kao_r is "Reverse activated RNAP binding rate";
  nc = 2; nc is "Stoichiometry of binding";
  nr = 30; nr is "Initial RNAP count";
  ko = 0.05; ko is "Open complex production rate";
  kb = 0.0001; kb is "Basal production rate";
  ng = 2; ng is "Initial promoter count";
  np = 10; np is "Stoichiometry of production";
  ka = 0.25; ka is "Activated production rate";
  ymax_AmtR = abs(normal(3.8, 3.8*ExNoise));
  ymin_AmtR = abs(normal(0.06, 0.06*ExNoise));
  alpha_AmtR = 1;
  beta_AmtR = 1;
  ymax_PhlF = abs(normal(4.1, 4.1*ExNoise));
  ymin_PhlF = abs(normal(0.02, 0.02*ExNoise));
  n_PhlF = abs(normal(3.9, 3.9*ExNoise));
  K_PhlF = abs(normal(0.13, 0.13*ExNoise));
  ExNoise = 0.4;

  // Assignment rules:
  PhlF_SS := ymin_PhlF + (ymax_PhlF - ymin_PhlF)*K_PhlF^n_PhlF/(K_PhlF^n_PhlF + (Y_LacI*alpha_AmtR*(Y_AmtR - ymin_AmtR + beta_AmtR*(ymax_AmtR - Y_AmtR))/(ymax_AmtR - ymin_AmtR) + Y_AmtR)^n_PhlF) - Y_PhlF;

  // Reactions:
  dy_PhlF: => Y_PhlF; piecewise(tauON*PhlF_SS, PhlF_SS > 0, tauOFF*PhlF_SS);  // modifiers: PhlFpart_fc, Y_LacI, Y_AmtR
    tauON = 1.7; tauOFF = 4.044444;
end
