// SBML level 3 version 2

function normal(m, s)
  m;
end
normal is "Normal distribution";

model YFPpart_module(Cell, Y_PhlF, Y_BetI, YFP)

  // Compartments:
  compartment Cell = 1;

  // Species:
  substanceOnly species YFPpart_fc in Cell = 2;
  substanceOnly species YFP in Cell = 0;
  substanceOnly species Y_PhlF in Cell = 0;
  substanceOnly species Y_BetI in Cell = 0;

  // Parameters:
  kr_f = 0.5; kr_f is "Forward repression binding rate";
  kr_r = 1; kr_r is "Reverse repression binding rate";
  ka_f = 0.0033; ka_f is "Forward activation binding rate";
  ka_r = 1; ka_r is "Reverse activation binding rate";
  ko_f = 0.033; ko_f is "Forward RNAP binding rate";
  ko_r = 1; ko_r is "Reverse RNAP binding rate";
  kao_f = 1; kao_f is "Forward activated RNAP binding rate";
  kao_r = 1; kao_r is "Reverse activated RNAP binding rate";
  nc = 2; nc is "Stoichiometry of binding";
  nr = 30; nr is "Initial RNAP count";
  ko = 0.05; ko is "Open complex production rate";
  kb = 0.0001; kb is "Basal production rate";
  ng = 2; ng is "Initial promoter count";
  np = 10; np is "Stoichiometry of production";
  ka = 0.25; ka is "Activated production rate";
  ymax_BetI = abs(normal(3.8, 3.8*ExNoise));
  ymin_BetI = abs(normal(0.07, 0.07*ExNoise));
  alpha_BetI = 1;
  beta_BetI = 1;
  ymax_YFP = abs(normal(2.829583, 2.829583*ExNoise));
  ymin_YFP = abs(normal(0.0464125, 0.0464125*ExNoise));
  n_YFP = abs(normal(2.65, 2.65*ExNoise));
  K_YFP = abs(normal(0.1295, 0.1295*ExNoise));
  ExNoise = 0.4;

  // Assignment rules:
  YFP_SS := Y_PhlF*alpha_BetI*(Y_BetI - ymin_BetI + beta_BetI*(ymax_BetI - Y_BetI))/(ymax_BetI - ymin_BetI) + Y_BetI;

  // Reactions:
  YFP_production: => YFP; tauON*YFP_SS - tauOFF*YFP;  // modifiers: YFPpart_fc, Y_PhlF, Y_BetI
    tauON = 1.7; tauOFF = 4.044444;
end
